# 3D Silicon crack simulation using Stillinger-Weber


variable name string tstp


dimension  	3
boundary 	s s p
units 		metal
atom_style 	atomic
neighbor 	0.3 bin
neigh_modify 	delay 5


# create geometry

lattice  diamond 5.43
region  box block 0 200 0 1000 0 1 units lattice
create_box 5 box
create_atoms 1 box

#masses of different atom sections
mass  1 28.06
mass  2 28.06
mass  3 28.06
mass  4 28.06
mass  5 28.06


# potential setup
pair_style sw
pair_coeff * * Si.sw Si Si Si Si Si


# define groups

#fix  1 all nvt temp 1 1 0.1
fix  1 all nve
run 0

variable topbound equal yhi-2
variable botbound equal ylo+2

#lower layer of atoms
region     1 block INF INF INF ${botbound} INF INF units box
group  lower region 1

#upper layer of atoms
region  2 block INF INF ${topbound} INF INF INF units box
group  upper region 2

#rest of the regions
group  boundary union lower upper
group  mobile subtract all boundary


# set crack position and length
variable quarter equal xhi/3 # crack elength for an edge crack
variable crack_pos_x equal yhi/2 # crack position
variable layer_1 equal (yhi+8.145)/2
variable layer_2 equal (yhi-8.145)/2


region  leftupper block INF ${quarter} ${crack_pos_x} ${layer_1} INF INF units box
region  leftlower block INF ${quarter} ${layer_2} ${crack_pos_x} INF INF units box
group  leftupper region leftupper
group  leftlower region leftlower


# setup for different groups
set  group leftupper type 2
set  group leftlower type 3
set  group lower type 4
set  group upper type 5


# initial velocities
compute    	new mobile temp
velocity 	mobile create 0.1 218552 temp new
velocity 	upper set 0.0 0.015 0.0
velocity 	lower set 0.0 -0.015 0.0

# Cmpute virial stresses
compute stress all stress/atom NULL
compute summ all reduce sum c_stress[1] c_stress[2] c_stress[3]
compute vvol all voronoi/atom

# fixes

fix  2 boundary setforce NULL 0.0 NULL

#set variables for output
variable	le equal ly
variable	tstp equal step
variable	virial equal c_summ[2]
dump 	1 all custom 2000 dump.${name}.* id type x y z vy c_stress[2] c_vvol[1]
fix 	print all print 100 "${tstp} ${le} ${virial}" file virial_stress_data.txt screen yes


# run

timestep 	0.01
thermo  	200
thermo_modify 	temp new
neigh_modify 	exclude type 2 3
run  		184000
